<?xml version="1.0" ?>
<!-- See http://wiki.sofa-framework.org/wiki/TutorialCollisionCubeObstacle.scn -->
<Node name="root" dt="0.01" gravity="0 -0 0">
    <!-- Basic Components to perform the collision detection -->

    <RequiredPlugin name="Sofa.Component.Collision.Detection.Algorithm"/> <!-- Needed to use components [BVHNarrowPhase, BruteForceBroadPhase, CollisionPipeline] -->
    <RequiredPlugin name="Sofa.Component.Collision.Detection.Intersection"/> <!-- Needed to use components [MinProximityIntersection] -->
    <RequiredPlugin name="Sofa.Component.Collision.Geometry"/> <!-- Needed to use components [LineCollisionModel, PointCollisionModel, SphereCollisionModel, TriangleCollisionModel] -->
    <RequiredPlugin name="Sofa.Component.Collision.Response.Contact"/> <!-- Needed to use components [CollisionResponse] -->
    <RequiredPlugin name="Sofa.Component.LinearSolver.Iterative"/> <!-- Needed to use components [CGLinearSolver] -->
    <RequiredPlugin name="Sofa.Component.Mass"/> <!-- Needed to use components [UniformMass] -->
    <RequiredPlugin name="Sofa.Component.ODESolver.Backward"/> <!-- Needed to use components [EulerImplicitSolver] -->
    <RequiredPlugin name="Sofa.Component.SolidMechanics.Spring"/> <!-- Needed to use components [MeshSpringForceField] -->
    <RequiredPlugin name="Sofa.Component.StateContainer"/> <!-- Needed to use components [MechanicalObject] -->
    <RequiredPlugin name="Sofa.Component.Topology.Container.Constant"/> <!-- Needed to use components [MeshTopology] -->
    <RequiredPlugin name="Sofa.Component.Visual"/> <!-- Needed to use components [VisualStyle] -->

    <VisualStyle displayFlags="showBehavior showCollisionModels" />
    <CollisionPipeline />
    <BruteForceBroadPhase/>
    <BVHNarrowPhase/>
    <CollisionResponse />
    <MinProximityIntersection alarmDistance="1" contactDistance="0.5"/>
    <DefaultAnimationLoop/>

    <!-- Using a deformable cube using collision spheres  -->
    <Node name="Cube1">
        <EulerImplicitSolver name="EulerImplicit Cube1"  rayleighStiffness="0.1" rayleighMass="0.1" />
        <CGLinearSolver name="CG Solver Cube1" iterations="25" tolerance="1e-5" threshold="1e-5"/>
        <MechanicalObject template="Rigid3d" name="myParticle"
            position="0 0 0    0 0 0 1"
            translation="0 0 0"
            velocity="1 0 0    0 0 0"
            showObject="1" />
        <MeshTopology name="Topology Cube1" hexas="0 4 6 2 1 5 7 3" />
        <UniformMass name="Mass Cube1" totalMass="1" />
        <!-- Collision Models -->
        <TriangleCollisionModel name="Triangles For Collision" />
        <LineCollisionModel name="Lines For Collision" />
        <PointCollisionModel name="Points For Collision" />
    </Node>
    <!-- Using a deformable cube using collision triangles, lines and points  -->
    <Node name="Cube2">
        <EulerImplicitSolver name="EulerImplicit Cube2" />
        <CGLinearSolver name="CG Solver Cube2" iterations="25" tolerance="1e-5" threshold="1e-5"/>
        <MechanicalObject template="Rigid3d" name="myParticle"
            position="0 0 0    0 0 0 1"
            translation="5 0 0"
            velocity="-1 0 0    0 0 0"
            showObject="1" />
        <MeshTopology name="Topology Cube2" hexas="0 4 6 2 1 5 7 3" />
        <UniformMass name="Mass Cube2" totalMass="1" />
        <!-- Collision Models -->
        <TriangleCollisionModel name="Triangles For Collision" />
        <LineCollisionModel name="Lines For Collision" />
        <PointCollisionModel name="Points For Collision" />
    </Node>
</Node>
